*Heading
** Job name: Job-1 Model name: Model-1
** Generated by: Abaqus/CAE 6.13-1
*Preprint, echo=NO, model=NO, history=NO, contact=NO
**
** PARTS
**
*Part, name=honeycomb
*Node
      1,  0.899999976,           0.,          20.
      2, -0.899999976,           0.,          20.
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*Element, type=S4R
 1,    1,  753, 5185,  772
 2,  753,    2,  754, 5185
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*Nset, nset=_PickedSet2, internal
    1,    2,    3,    4,    5,    6
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*Elset, elset=_PickedSet2, internal
     1,     2,     3,     4,     5,     6
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*Nset, nset=_PickedSet3, internal
    1,    2,    3,    4,    5,    6
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*Elset, elset=_PickedSet3, internal
    21,    22,    23,    24,    25,    26
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** Section: honeythickness2
*Shell Section, elset=_PickedSet2, material=Material-1
0.1, 5
** Section: honeythickness1
*Shell Section, elset=_PickedSet3, material=Material-1
0.05, 5
*End Part
**
**
** ASSEMBLY
**
*Assembly, name=Assembly
**
*Instance, name=honeycomb-1, part=honeycomb
*End Instance
**
*Nset, nset=Set-1, instance=honeycomb-1
    1,    2,    5,    7,    9,   11
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*Elset, elset=Set-1, instance=honeycomb-1
     1,     2,    21,    22,    41,    42
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*Elset, elset=_Surf-1_SPOS, internal, instance=honeycomb-1
    41,    42,    43,    44,    45,    46
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*Surface, type=ELEMENT, name=Surf-1
_Surf-1_SPOS, SPOS
*End Assembly
**
** MATERIALS
**
*Material, name=Material-1
*Elastic
70000., 0.3
**
** BOUNDARY CONDITIONS
**
** Name: BC-1 Type: Symmetry/Antisymmetry/Encastre
*Boundary
Set-1, ENCASTRE
** ----------------------------------------------------------------
**
** STEP: Step-1
**
*Step, name=Step-1, nlgeom=YES
*Static
1., 1., 1e-05, 1.
**
** LOADS
**
** Name: Load-1   Type: Pressure
*Dsload
Surf-1, P, 10.
**
** OUTPUT REQUESTS
**
*Restart, write, frequency=0
**
** FIELD OUTPUT: F-Output-1
**
*Output, field, variable=PRESELECT
**
** HISTORY OUTPUT: H-Output-1
**
*Output, history, variable=PRESELECT
*End Step
